// COMSOL Multiphysics 5.6.0.280 model "3.1.-Concentrador de Esfuerzo Placa 3D con Barrenos Laterales Tension.mph"
// Outline of the model tree

Geometry
  geom1 "Geometry 1" (3D, length unit in)
    blk1: Block | size = {6.5, 0.5, 1.5}
    cyl1: Cylinder | pos = {3.25, 0, 1.5}; axistype = y; r = .25; h = 0.5
    cyl2: Cylinder | pos = {3.25, 0, 0}; axistype = y; r = .25; h = 0.5
    dif1: Difference | input = blk1; input2 = cyl1, cyl2; intbnd = off; face = all
    fin: Finalize "Form Union"

Materials
  mat1: Common "Structural steel" on all domains
    def "Basic"
      relpermeability = 1
      heatcapacity = 475[J/(kg*K)]
      thermalconductivity = 44.5[W/(m*K)]
      electricconductivity = 4.032e6[S/m]
      relpermittivity = 1
      thermalexpansioncoefficient = 12.3e-6[1/K]
      density = 7850[kg/m^3]
    Enu "Young's modulus and Poisson's ratio"
      youngsmodulus = 200e9[Pa]
      poissonsratio = 0.30
    Murnaghan
      l = -3.0e11[Pa]
      m = -6.2e11[Pa]
      n = -7.2e11[Pa]
    Lame "Lamé parameters"
      lambLame = 1.15e11[Pa]
      muLame = 7.69e10[Pa]

Physics
  solid: SolidMechanics on all domains
    dependent variable u = {u, v, w}
    lemm1: LinearElasticModel "Linear Elastic Material 1" (default)
    free1: Free (default)
    init1: init "Initial Values 1" (default)
    fix1: Fixed "Fixed Constraint 1" on boundaries 12
    bndl1: BoundaryLoad on boundaries 1 | LoadType = TotalForce; Ftot = {-6000[lbf], 0, 0}; FperArea = {6000, 0, 0}

Mesh
  mesh1 "Mesh 1"
    size: MeshSizeDefault | hauto = 1
    ftet1: FreeTet "Free Tetrahedral 1" on remaining entities

Studies
  std1 "Study 1"
    stat: Stationary

Solver configurations
  sol1 "Solution 1" (study std1)
    v1: Variables "Dependent Variables 1"
    s1: Stationary "Stationary Solver 1"
      fc1: FullyCoupled | linsolver = d1
      d1: Direct "Suggested Direct Solver (solid)"

Datasets
  dset1: Solution | solution = sol1

Derived values
  max1: MaxLine "Line Maximum 1" on edges 17 | data = dset1; table = tbl1; expr = solid.sx; unit = ksi
  min1: MinLine "Line Minimum 1" on edges 17 | data = dset1; table = tbl2; expr = solid.sx; unit = ksi
  av1: AvLine "Line Average 1" on edges 17 | data = dset1; table = tbl3; expr = solid.sx; unit = ksi

Tables
  tbl2: Table
    // Line Minimum 1 (solid.sx)
    Stress tensor, x component (ksi)
    22.7209
  tbl3: Table
    // Line Average 1 (solid.sx)
    Stress tensor, x component (ksi)
    24.8408

Plots
  pg1: PlotGroup3D "Stress (solid)" | data = dset1
    surf1: Surface | expr = solid.mises; unit = ksi
      def: Deform "Deformation" | expr = {u, v, w}; descr = Displacement field
  pg2: PlotGroup3D "Desplazamiento" | data = dset1
    surf1: Surface | expr = u; unit = mm