// COMSOL Multiphysics 5.6.0.280 model "Practica3_ConcentradorEsfuerzoPlacaTension2D.mph"
// Outline of the model tree

Geometry
  geom1 "Geometry 1" (2D, length unit in)
    r1: Rectangle | size = {3.25, 3/4}
    c1: Circle | pos = {0, 3/4}; r = 0.25
    dif1: Difference | input = r1; input2 = c1; intbnd = off; edge = all
    fin: Finalize "Form Union"

Materials
  mat1: Common "Structural steel"
    def "Basic"
      relpermeability = 1
      heatcapacity = 475[J/(kg*K)]
      thermalconductivity = 44.5[W/(m*K)]
      electricconductivity = 4.032e6[S/m]
      relpermittivity = 1
      thermalexpansioncoefficient = 12.3e-6[1/K]
      density = 7850[kg/m^3]
    Enu "Young's modulus and Poisson's ratio"
      youngsmodulus = 200e9[Pa]
      poissonsratio = 0.30
    Murnaghan
      l = -3.0e11[Pa]
      m = -6.2e11[Pa]
      n = -7.2e11[Pa]
    Lame "Lamé parameters"
      lambLame = 1.15e11[Pa]
      muLame = 7.69e10[Pa]
  mat2: Common "Structural steel 1"
    // same settings as mat1
  mat3: Common "Structural steel" on all domains
    // same settings as mat1

Physics
  solid: SolidMechanics on all domains
    dependent variable u = {u, v, w}
    Type2D.Type2D = PlaneStress
    d.d = 0.5[in]
    lemm1: LinearElasticModel "Linear Elastic Material 1" (default)
    free1: Free (default)
    init1: init "Initial Values 1" (default)
    sym1: SymmetrySolid "Symmetry 1" on boundaries 1, 2
    bndl1: BoundaryLoad on boundaries 4 | LoadType = FollowerPressure; FollowerPressure = -8000[psi]

Mesh
  mesh1 "Mesh 1"
    size: MeshSizeDefault | hauto = 1
    ftri1: FreeTri "Free Triangular 1" on remaining entities

Studies
  std1 "Study 1"
    stat: Stationary

Solver configurations
  sol1 "Solution 1" (study std1)
    v1: Variables "Dependent Variables 1"
    s1: Stationary "Stationary Solver 1"
      dDef: Direct
      fc1: FullyCoupled | linsolver = dDef

Datasets
  dset1: Solution | solution = sol1

Plots
  pg1: PlotGroup2D "Stress (solid)" | data = dset1
    surf1: Surface | expr = solid.sx; unit = ksi
      def: Deform "Deformation" | expr = {u, v}; descr = Displacement field