// COMSOL Multiphysics 5.6.0.280 model "Practica4_ConcentradorEsfuerzoEjeEscalonadoFlexion.mph"
// Outline of the model tree

Geometry
  geom1 "Geometry 1" (3D, length unit mm)
    cyl1: Cylinder | axistype = x; r = 30; h = 90
    cyl2: Cylinder | pos = {90, 0, 0}; axistype = x; r = 45; h = 90
    uni1: Union | input = cyl1, cyl2; intbnd = off; face = all
    fil1: Fillet3D "Fillet 1" | edge = uni1(1) edges 12, 13, 16, 17; radius = 6; filletsharp = on
    fin: Finalize "Form Union"

Materials
  mat1: Common "Aluminum" on all domains
    def "Basic"
      relpermeability = 1
      heatcapacity = 900[J/(kg*K)]
      thermalconductivity = 238[W/(m*K)]
      electricconductivity = 3.774e7[S/m]
      relpermittivity = 1
      thermalexpansioncoefficient = 23e-6[1/K]
      density = 2700[kg/m^3]
    Enu "Young's modulus and Poisson's ratio"
      youngsmodulus = 70e9[Pa]
      poissonsratio = 0.33
    Murnaghan
      l = -2.5e11[Pa]
      m = -3.3e11[Pa]
      n = -3.5e11[Pa]
    Lame "Lamé parameters"
      lambLame = 5.1e10[Pa]
      muLame = 2.6e10[Pa]

Physics
  solid: SolidMechanics on all domains
    dependent variable u = {u, v, w}
    lemm1: LinearElasticModel "Linear Elastic Material 1" (default)
    free1: Free (default)
    init1: init "Initial Values 1" (default)
    fix1: Fixed "Fixed Constraint 1" on boundaries 15
    bndl1: BoundaryLoad on boundaries 1 | LoadType = TotalForce; Ftot = {0, 0, -5555.555}

Mesh
  mesh1 "Mesh 1"
    size: MeshSizeDefault | hmax = 9.9; hauto = 3
    ftet1: FreeTet "Free Tetrahedral 1" on remaining entities

Studies
  std1 "Study 1"
    stat: Stationary

Solver configurations
  sol1 "Solution 1" (study std1)
    v1: Variables "Dependent Variables 1"
    s1: Stationary "Stationary Solver 1"
      fc1: FullyCoupled | linsolver = d1
      d1: Direct "Suggested Direct Solver (solid)"

Datasets
  dset1: Solution | solution = sol1

Plots
  pg1: PlotGroup3D "Stress (solid)" | data = dset1
    surf1: Surface | expr = solid.sx; unit = MPa
      def: Deform "Deformation" | expr = {u, v, w}; descr = Displacement field