// COMSOL Multiphysics 5.6.0.280 model "Practica5_ProbetaTension.mph"
// Outline of the model tree

Geometry
  geom1 "Geometry 1" (3D, length unit mm)
    cyl1: Cylinder | ax2 = {0.0, 0.0}; r = 10; h = 30
    cyl2: Cylinder | pos = {0, 0, 30}; ax2 = {0.0, 0.0}; r = 7; h = 40
    cyl3: Cylinder | pos = {0, 0, 70}; ax2 = {0.0, 0.0}; r = 10; h = 30
    uni1: Union | input = cyl1, cyl2, cyl3; intbnd = off; face = all
    fil1: Fillet3D "Fillet 1" | edge = uni1(1) edges 12-15, 23, 24, 26, 27; radius = 3
    fin: Finalize "Form Union"

Materials
  mat1: Common "Steel AISI 4340" on all domains
    def "Basic"
      relpermeability = 1
      electricconductivity = 4.032e6[S/m]
      thermalexpansioncoefficient = 12.3e-6[1/K]
      heatcapacity = 475[J/(kg*K)]
      relpermittivity = 1
      density = 7850[kg/m^3]
      thermalconductivity = 44.5[W/(m*K)]
    Enu "Young's modulus and Poisson's ratio"
      youngsmodulus = 205e9[Pa]
      poissonsratio = 0.28

Physics
  solid: SolidMechanics on all domains
    dependent variable u = {u, v, w}
    lemm1: LinearElasticModel "Linear Elastic Material 1" (default)
    free1: Free (default)
    init1: init "Initial Values 1" (default)
    fix1: Fixed "Fixed Constraint 1" on boundaries 3
    bndl1: BoundaryLoad on boundaries 10 | LoadType = ForceArea; FperArea = {0, 0, 100[N/mm^2]}

Mesh
  mesh1 "Mesh 1"
    size: MeshSizeDefault | hauto = 2
    ftet1: FreeTet "Free Tetrahedral 1" on remaining entities

Studies
  std1 "Study 1"
    stat: Stationary

Solver configurations
  sol1 "Solution 1" (study std1)
    v1: Variables "Dependent Variables 1"
    s1: Stationary "Stationary Solver 1"
      fc1: FullyCoupled | linsolver = d1
      d1: Direct "Suggested Direct Solver (solid)"

Datasets
  dset1: Solution | solution = sol1

Plots
  pg1: PlotGroup3D "Esfuerzo z" | data = dset1
    surf1: Surface | expr = solid.sz; unit = MPa
      def: Deform "Deformation" | expr = {u, v, w}; descr = Displacement field
  pg2: PlotGroup3D "Deformacion eje z" | data = dset1
    surf1: Surface | expr = w
      def1: Deform "Deformation" | expr = {u, v, w}