// COMSOL Multiphysics 5.6.0.280 model "Practica6_Recipiente_a_PresiónInterna.mph"
// Outline of the model tree

Geometry
  geom1 "Geometry 1" (3D, length unit m)
    wp1: WorkPlane | quickplane = xz; unite = on
      r1: Rectangle | pos = {0, 175}; size = {100, 25}
      r2: Rectangle | pos = {75, 0}; size = {25, 200}
      uni1: Union | input = r1, r2; intbnd = off; edge = all
      fil1: Fillet | point = uni1(1) points 4; radius = 25
    rev1: Revolve | workplane = wp1; input = wp1; angle2 = 30
    fin: Finalize "Form Union"

Materials
  mat1: Common "Structural steel" on all domains
    def "Basic"
      relpermeability = 1
      heatcapacity = 475[J/(kg*K)]
      thermalconductivity = 44.5[W/(m*K)]
      electricconductivity = 4.032e6[S/m]
      relpermittivity = 1
      thermalexpansioncoefficient = 12.3e-6[1/K]
      density = 7850[kg/m^3]
    Enu "Young's modulus and Poisson's ratio"
      youngsmodulus = 200e9[Pa]
      poissonsratio = 0.30
    Murnaghan
      l = -3.0e11[Pa]
      m = -6.2e11[Pa]
      n = -7.2e11[Pa]
    Lame "Lamé parameters"
      lambLame = 1.15e11[Pa]
      muLame = 7.69e10[Pa]

Physics
  solid: SolidMechanics on all domains
    dependent variable u = {u, v, w}
    lemm1: LinearElasticModel "Linear Elastic Material 1" (default)
    free1: Free (default)
    init1: init "Initial Values 1" (default)
    sym1: SymmetrySolid "Symmetry 1" on boundaries 1, 2, 7
    bndl1: BoundaryLoad on boundaries 3, 5, 6 | LoadType = FollowerPressure; FollowerPressure = 35e6

Mesh
  mesh1 "Mesh 1"
    size: MeshSizeDefault | hauto = 1
    ftet1: FreeTet "Free Tetrahedral 1" on remaining entities

Studies
  std1 "Study 1"
    stat: Stationary

Solver configurations
  sol1 "Solution 1" (study std1)
    v1: Variables "Dependent Variables 1"
    s1: Stationary "Stationary Solver 1"
      fc1: FullyCoupled | linsolver = d1
      d1: Direct "Suggested Direct Solver (solid)"

Datasets
  dset1: Solution | solution = sol1

Derived values
  pev1: EvalPoint "Point Evaluation 1" on points 8
    data = dset1
    table = tbl1
    expr = {solid.sp1, solid.sp2, solid.sp3, solid.mises}
    unit = {MPa, MPa, MPa, MPa}

Tables
  tbl1: Table
    // Point Evaluation 1 (solid.sp1, solid.sp2, solid.sp3, solid.mises)
    First principal stress (MPa), Point: 8 | Second principal stress (MPa), Point: 8 | Third principal stress (MPa), Point: 8 | von Mises stress (MPa), Point: 8
    127.417 | 46.4192 | -35.0057 | 140.662

Plots
  pg1: PlotGroup3D "Stress (solid)" | data = dset1
    surf1: Surface | expr = solid.mises; unit = MPa
      def: Deform "Deformation" | expr = {u, v, w}; descr = Displacement field