// COMSOL Multiphysics 5.3.1.201 model "Practica10_TorsionElementoCircular.mph"
// Outline of the model tree

Geometry
  geom1 "Geometry 1" (3D, length unit m)
    wp1: WorkPlane | quickplane = yz; unite = on
      c1: Circle | r = 30 [mm]
      c2: Circle | r = 20 [mm]
      dif1: Difference | input = c1; input2 = c2
    ext1: Extrude | workplane = wp1; input = wp1; distance = 1.5
    fin: Finalize "Form Union"

Materials
  mat1: Common "Structural steel" on all domains
    def "Basic"
      relpermeability = 1
      heatcapacity = 475[J/(kg*K)]
      thermalconductivity = 44.5[W/(m*K)]
      electricconductivity = 4.032e6[S/m]
      relpermittivity = 1
      thermalexpansioncoefficient = 12.3e-6[1/K]
      density = 7850[kg/m^3]
    Enu "Young's modulus and Poisson's ratio"
      youngsmodulus = 200e9[Pa]
      poissonsratio = 0.30
    Murnaghan
      l = -3.0e11[Pa]
      m = -6.2e11[Pa]
      n = -7.2e11[Pa]
    Lame "Lamé parameters"
      lambLame = 1.15e11[Pa]
      muLame = 7.69e10[Pa]

Physics
  solid: SolidMechanics on all domains
    dependent variable u = {u, v, w}
    lemm1: LinearElasticModel "Linear Elastic Material 1" (default)
    free1: Free (default)
    init1: init "Initial Values 1" (default)
    fix1: Fixed "Fixed Constraint 1" on boundaries 10
    rig1: RigidConnector on boundaries 1
      rm1: RigidBodyMoment "Applied Moment 1" | Mt = {-4084.0704, 0, 0}

Mesh
  mesh1 "Mesh 1"
    size: MeshSizeDefault | hauto = 3
    ftet2: FreeTet "Free Tetrahedral 2" on remaining entities

Studies
  std1 "Study 1"
    stat: Stationary

Solver configurations
  sol1 "Solution 1" (study std1)
    v1: Variables "Dependent Variables 1"
      comp1_u: Field "Displacement field (comp1.u)" | scalemethod = manual; scaleval = 1e-2*1.50239808307
      comp1_solid_uvw_rig1: State "comp1.solid.uvw_rig1" | scalemethod = manual; scaleval = 1e-2*1.50239808307
      comp1_solid_a_rig1: State "comp1.solid.a_rig1" | scalemethod = manual; scaleval = 1e-2
      comp1_solid_bcd_rig1: State "comp1.solid.bcd_rig1" | scalemethod = manual; scaleval = 1e-2
    s1: Stationary "Stationary Solver 1"
      fc1: FullyCoupled | linsolver = d1
      d1: Direct "Suggested Direct Solver (solid)"

Datasets
  dset1: Solution | solution = sol1

Plots
  pg1: PlotGroup3D "Esfuerzo cortante" | data = dset1
    surf1: Surface | expr = solid.stt; unit = MPa
      def: Deform "Deformation" | expr = {u, v, w}; descr = Displacement field
  pg2: PlotGroup3D "Angulo de torsión" | data = dset1
    surf1: Surface | expr = solid.FdyZ; unit = 1
      def: Deform "Deformation" | expr = {u, v, w}; descr = Displacement field