// COMSOL Multiphysics 5.6.0.280 model "Practica11_VibracionVigasmph.mph"
// Outline of the model tree

Geometry
  geom1 "Geometry 1" (3D, length unit m)
    blk1: Block | size = {14.5[in], 1[in], 0.125[in]}
    fin: Finalize "Form Union"

Materials
  mat1: Common "Material 1" on all domains
    def "Basic"
      youngsmodulus = 30e6[psi]
      poissonsratio = 0.3
      density = 7850

Physics
  solid: SolidMechanics on all domains
    dependent variable u = {u, v, w}
    lemm1: LinearElasticModel "Linear Elastic Material 1" (default)
    free1: Free (default)
    init1: init "Initial Values 1" (default)
    fix1: Fixed "Fixed Constraint 1" on boundaries 6

Mesh
  mesh1 "Mesh 1"
    size: MeshSizeDefault | hauto = 3
    ftet1: FreeTet "Free Tetrahedral 1" on remaining entities

Studies
  std1 "Study 1"
    eig: Eigenfrequency | neigs = 10; shift = 1[Hz]

Solver configurations
  sol1 "Solution 1" (study std1)
    v1: Variables "Dependent Variables 1"
    e1: Eigenvalue "Eigenvalue Solver 1"
      dDef: Direct

Datasets
  dset1: Solution | solution = sol1

Plots
  pg1: PlotGroup3D "Mode Shape (solid)" | data = dset1
    surf1: Surface | expr = solid.disp; unit = in
      def: Deform "Deformation" | expr = {u, v, w}; descr = Displacement field

Exports
  anim1: Animation | target = player; sweeptype = dde