// COMSOL Multiphysics 5.6.0.280 model "Practica14_EsfuerzoResorte.mph"
// Outline of the model tree

Geometry
  geom1 "Geometry 1" (3D, length unit in)
    hel1: Helix | turns = 10; rmaj = 0.561/2; rmin = 0.055/2; axialpitch = 0.175; chirality = left
    blk1: Block | base = center; size = {0.65, 0.65, 0.055}
    blk2: Block | pos = {0, 0, 1.75}; base = center; size = {0.65, 0.65, 0.055}
    uni1: Union | input = blk1, blk2, hel1
    fin: Finalize "Form Union"

Materials
  mat1: Common "Structural steel" on all domains
    def "Basic"
      relpermeability = 1
      heatcapacity = 475[J/(kg*K)]
      thermalconductivity = 44.5[W/(m*K)]
      electricconductivity = 4.032e6[S/m]
      relpermittivity = 1
      thermalexpansioncoefficient = 12.3e-6[1/K]
      density = 7850[kg/m^3]
    Enu "Young's modulus and Poisson's ratio"
      youngsmodulus = 200e9[Pa]
      poissonsratio = 0.30
    Murnaghan
      l = -3.0e11[Pa]
      m = -6.2e11[Pa]
      n = -7.2e11[Pa]
    Lame "Lamé parameters"
      lambLame = 1.15e11[Pa]
      muLame = 7.69e10[Pa]

Physics
  solid: SolidMechanics on all domains
    dependent variable u = {u, v, w}
    lemm1: LinearElasticModel "Linear Elastic Material 1" (default)
    free1: Free (default)
    init1: init "Initial Values 1" (default)
    fix1: Fixed "Fixed Constraint 1" on boundaries 1-3, 9, 25, 28
    bndl1: BoundaryLoad on boundaries 5, 6, 8, 10, 26, 29 | LoadType = TotalForce; Ftot = {0, 0, -5[lbf]}

Mesh
  mesh1 "Mesh 1"
    ftet1: FreeTet "Free Tetrahedral 1" on remaining entities

Studies
  std1 "Study 1"
    stat: Stationary

Solver configurations
  sol1 "Solution 1" (study std1)
    v1: Variables "Dependent Variables 1"
    s1: Stationary "Stationary Solver 1"
      fc1: FullyCoupled | linsolver = d1
      d1: Direct "Suggested Direct Solver (solid)"

Datasets
  dset1: Solution | solution = sol1

Plots
  pg1: PlotGroup3D "Stress (solid)" | data = dset1
    surf1: Surface | expr = solid.sxz; unit = MPa
      def: Deform "Deformation" | expr = {u, v, w}; descr = Displacement field