// COMSOL Multiphysics 5.6.0.280 model "Practica16_PandeoColumnas.mph"
// Outline of the model tree

Geometry
  geom1 "Geometry 1" (3D, length unit m)
    wp1: WorkPlane | unite = on
      ls1: LineSegment | specify1 = coord; specify2 = coord; coord2 = {30[cm], 0}
      ls2: LineSegment | specify1 = coord; coord1 = {.30, 0}; specify2 = coord; coord2 = {0.15, 0.15*3^0.5}
      ls3: LineSegment | specify1 = coord; coord1 = {0.15, 0.15*3^0.5}; specify2 = coord
      csol1: ConvertToSolid | input = ls1, ls2, ls3
      fil1: Fillet | point = csol1(1) points 1-3; radius = 0.01
      c1: Circle | pos = {0.15, 0.12}; r = 0.04
      dif1: Difference | input = fil1; input2 = c1
    ext1: Extrude | workplane = wp1; input = wp1; distance = 200[cm]
    fin: Finalize "Form Union"

Materials
  mat1: Common "Aluminum 6063-T83" on all domains
    def "Basic"
      relpermeability = 1
      electricconductivity = 3.030e7[S/m]
      thermalexpansioncoefficient = 23.4e-6[1/K]
      heatcapacity = 900[J/(kg*K)]
      relpermittivity = 1
      density = 2700[kg/m^3]
      thermalconductivity = 201[W/(m*K)]
    Enu "Young's modulus and Poisson's ratio"
      youngsmodulus = 69e9[Pa]
      poissonsratio = 0.33

Physics
  solid: SolidMechanics on all domains
    dependent variable u = {u, v, w}
    lemm1: LinearElasticModel "Linear Elastic Material 1" (default)
    free1: Free (default)
    init1: init "Initial Values 1" (default)
    fix1: Fixed "Fixed Constraint 1" on boundaries 3
    bndl1: BoundaryLoad on boundaries 4 | LoadType = FollowerPressure; FollowerPressure = 100

Mesh
  mesh1 "Mesh 1"
    size: MeshSizeDefault | hauto = 4
    ftet1: FreeTet "Free Tetrahedral 1" on remaining entities

Studies
  std1 "Study 1"
    stat: Stationary
    buckling: LinearBuckling

Solver configurations
  sol1 "Solution 1" (study std1)
    v1: Variables "Dependent Variables 1"
    s1: Stationary "Stationary Solver 1"
      fc1: FullyCoupled | linsolver = d1
      d1: Direct "Suggested Direct Solver (solid)"
    su1: StoreSolution
    v2: Variables "Dependent Variables 2" | initmethod = sol; notsolmethod = sol
    e1: Eigenvalue "Eigenvalue Solver 1" | transform = critical_load_factor; neigs = 1; linpmethod = sol
      dDef: Direct
  sol2 "Solution Store 1" (study std1)

Datasets
  dset1: Solution | solution = sol1
  dset2: Solution | solution = sol2

Plots
  pg1: PlotGroup3D "Mode Shape (solid)" | data = dset1
    surf1: Surface | expr = solid.disp
      def: Deform "Deformation" | expr = {u, v, w}; descr = Displacement field