// COMSOL Multiphysics 5.3.1.201 model "Practica17_VibracionEstructuras.mph"
// Outline of the model tree

Geometry
  geom1 "Geometry 1" (2D, length unit ft)
    ls1: LineSegment | specify1 = coord; coord1 = {0, 1.5}; specify2 = coord; coord2 = {1.5, 1.5}
    ls2: LineSegment | specify1 = coord; coord1 = {1.5, 1.5}; specify2 = coord; coord2 = {3, 1.5}
    ls3: LineSegment | specify1 = coord; coord1 = {3, 1.5}; specify2 = coord; coord2 = {4.5, 1.5}
    ls4: LineSegment | specify1 = coord; coord1 = {4.5, 1.5}; specify2 = coord; coord2 = {6, 1.5}
    ls5: LineSegment | specify1 = coord; coord1 = {6, 1.5}; specify2 = coord; coord2 = {7.5, 1.5}
    ls6: LineSegment | specify1 = coord; coord1 = {7.5, 1.5}; specify2 = coord; coord2 = {9, 1.5}
    ls7: LineSegment | specify1 = coord; coord1 = {1.5, 0}; specify2 = coord; coord2 = {3, 0}
    ls8: LineSegment | specify1 = coord; coord1 = {3, 0}; specify2 = coord; coord2 = {4.5, 0}
    ls9: LineSegment | specify1 = coord; coord1 = {4.5, 0}; specify2 = coord; coord2 = {6, 0}
    ls10: LineSegment | specify1 = coord; coord1 = {6, 0}; specify2 = coord; coord2 = {7.5, 0}
    ls11: LineSegment | specify1 = coord; coord1 = {0, 1.5}; specify2 = coord; coord2 = {1.5, 0}
    ls12: LineSegment | specify1 = coord; coord1 = {7.5, 0}; specify2 = coord; coord2 = {9, 1.5}
    ls13: LineSegment | specify1 = coord; coord1 = {1.5, 0}; specify2 = coord; coord2 = {1.5, 1.5}
    ls14: LineSegment | specify1 = coord; coord1 = {3, 0}; specify2 = coord; coord2 = {3, 1.5}
    ls15: LineSegment | specify1 = coord; coord1 = {4.5, 0}; specify2 = coord; coord2 = {4.5, 1.5}
    ls16: LineSegment | specify1 = coord; coord1 = {6, 0}; specify2 = coord; coord2 = {6, 1.5}
    ls17: LineSegment | specify1 = coord; coord1 = {7.5, 0}; specify2 = coord; coord2 = {7.5, 1.5}
    ls18: LineSegment | specify1 = coord; coord1 = {1.5, 1.5}; specify2 = coord; coord2 = {3, 0}
    ls19: LineSegment | specify1 = coord; coord1 = {3, 1.5}; specify2 = coord; coord2 = {4.5, 0}
    ls20: LineSegment | specify1 = coord; coord1 = {6, 1.5}; specify2 = coord; coord2 = {4.5, 0}
    ls21: LineSegment | specify1 = coord; coord1 = {7.5, 1.5}; specify2 = coord; coord2 = {6, 0}
    fin: Finalize "Form Union"

Materials
  mat1: Common "Material 1" on all boundaries
    def "Basic"
      youngsmodulus = 200e9
      poissonsratio = 0.3
      density = 7850

Physics
  truss: Truss on all boundaries
    dependent variable u = {u, v, w}
    emm1: Elastic "Linear Elastic Material 1" (default)
      dmp1: Damping on all boundaries | DampingType = IsotropicLossFactor; eta_s_mat = userdef; eta_s = 0.01
    csd1: CrossSectionBeam "Area de seccion transversal 1" (default) | area = 9.22[in^2]
    sec1: StraightEdgeConstraint (default)
    free1: Free (default)
    init1: init "Initial Values 1" (default)
    disp1: Displacement0 "Prescribed Displacement 1" on points 12 | Direction = {0, 1, 0}
    pin1: Pinned on points 1
    csd2: CrossSectionBeam "Area de seccion transversal 2" on boundaries 1, 3, 5, 7, 9, 11, 13, 15, 17, 19, 20
      area = 4.61[in^2]
    pl1: PointLoad "Carga en nodos B y C" on points 3, 5 | Fp = {200, -2000, 0}
    pl2: PointLoad "Carga en nodo D" on points 7 | Fp = {0, -8000, 0}

Mesh
  mesh1 "Mesh 1" (physics-controlled)

Studies
  std1 "Estudio Estático"
    stat: Stationary
  std2 "Frecuencias Naturales"
    eig: Eigenfrequency | shift = 1[Hz]
  std3 "Study 3"
    freq: Frequency "Gráfico de frecuencia y Amplitud" | plist = range(20,5,1000)

Solver configurations
  sol1 "Solution 1" (study std1)
    v1: Variables "Dependent Variables 1"
    s1: Stationary "Stationary Solver 1"
      dDef: Direct
      fc1: FullyCoupled | linsolver = dDef
  sol2 "Solution 2" (study std2)
    v1: Variables "Dependent Variables 1"
    e1: Eigenvalue "Eigenvalue Solver 1"
      dDef: Direct
  sol3 "Solution 3" (study std3)
    v1: Variables "Dependent Variables 1"
    s1: Stationary "Stationary Solver 1"
      dDef: Direct
      p1: Parametric | pname = freq; plistarr = range(20,5,1000); punit = Hz; pcontinuationmode = no
      fc1: FullyCoupled | linsolver = dDef

Datasets
  dset1: Solution | solution = sol1
  dset2: Solution | solution = sol2
  dset3: Solution | solution = sol3

Plots
  pg1: PlotGroup2D "Force (truss)" | data = dset1
    line1: Line | expr = truss.Nxl; unit = kN; linetype = tube; radiusexpr = sqrt(truss.area/pi)
      def1: Deform "Deformation" | expr = {u, v}
  pg2: PlotGroup2D "Stress (truss)" | data = dset1
    line1: Line | expr = truss.sn; unit = MPa; linetype = tube; radiusexpr = sqrt(truss.area/pi)
      def1: Deform "Deformation" | expr = {u, v}
  pg3: PlotGroup2D "Mode Shape (truss)" | data = dset2
    line1: Line | expr = truss.disp; linetype = tube; radiusexpr = sqrt(truss.area/pi)
      def1: Deform "Deformation" | expr = {u, v}
  pg4: PlotGroup2D "Force (truss) 1" | data = dset3
    line1: Line | expr = truss.Nxl; linetype = tube; radiusexpr = sqrt(truss.area/pi)
      def1: Deform "Deformation" | expr = {u, v}
  pg5: PlotGroup2D "Stress (truss) 1" | data = dset3
    line1: Line | expr = truss.sn; linetype = tube; radiusexpr = sqrt(truss.area/pi)
      def1: Deform "Deformation" | expr = {u, v}
  pg6: PlotGroup1D "Gráfica frecuencia y amplitud" | data = dset3
    ptgr1: PointGraph on points 2-11 | expr = truss.disp; unit = mm

Exports
  anim1: Animation | target = player; sweeptype = dde; maxframes = 11