// COMSOL Multiphysics 5.6.0.280 model "Practica18_TranferenciaDeCalor.mph"
// Outline of the model tree

Common definitions
  amth_ht: AmbientProperties "Ambient Thermal Properties (ht)" | Ish_amb = 0[W/m^2]

Geometry
  geom1 "Geometry 1" (2D, length unit cm)
    r1: Rectangle | size = {10, 100}
    r2: Rectangle | pos = {10, 0}; size = {10, 100}
    fin: Finalize "Form Union"

Physics
  ht: HeatTransfer "Heat Transfer in Solids" on all domains
    dependent variable T
    solid1: SolidHeatTransferModel "Solid 1" (default) | k_mat = userdef; k = 5
    init1: init "Initial Values 1" (default)
    ins1: ThermalInsulation (default)
    solid2: SolidHeatTransferModel "Solid 2" on domains 2 | k_mat = userdef; k = 0.4
    hf1: HeatFluxBoundary "Pared izquierda" on boundaries 1 | HeatFluxType = ConvectiveHeatFlux; h = 10
    hf2: HeatFluxBoundary "Pared derecha" on boundaries 7 | HeatFluxType = ConvectiveHeatFlux; h = 10; Text = 273.15[K]

Mesh
  mesh1 "Mesh 1"
    size: MeshSizeDefault | hmax = 0.5; hauto = 1; custom = on
    fq1: FreeQuad on remaining entities

Studies
  std1 "Study 1"
    stat: Stationary

Solver configurations
  sol1 "Solution 1" (study std1)
    v1: Variables "Dependent Variables 1"
    s1: Stationary "Stationary Solver 1"
      fc1: FullyCoupled | linsolver = d1; initstep = 0.01; minstep = 1.0E-6; maxiter = 50
      d1: Direct | linsolver = pardiso

Datasets
  dset1: Solution | solution = sol1

Derived values
  pev1: EvalPoint "Point Evaluation 1" on points 1, 3, 5 | data = dset1; table = tbl1; expr = T

Tables
  tbl1: Table
    // Point Evaluation 1 (T)
    Temperature (K), Point: 1 | Temperature (K), Point: 3 | Temperature (K), Point: 5
    288.895 | 288.044 | 277.405

Plots
  pg1: PlotGroup2D "Temperature (ht)" | data = dset1
    surf1: Surface | expr = T; unit = degC
    arws1: ArrowSurface | expr = {ht.tfluxx, ht.tfluxy}
  pg2: PlotGroup2D "Isothermal Contours (ht)" | data = dset1
    con1: Contour | expr = T
  pg3: PlotGroup2D "Flujo de calor" | data = dset1
    surf1: Surface | expr = ht.tfluxx; unit = W/m^2; descr = Total heat flux, x component
    arws1: ArrowSurface | expr = {ht.tfluxx, ht.tfluxy}