// COMSOL Multiphysics 5.6.0.280 model "Viga Sometida A Carga Distribuida - Comparación Método Numérico VS Simulación COMSOL.mph"
// Outline of the model tree

Geometry
  geom1 "Geometry 1" (2D, length unit ft)
    ls1: LineSegment | specify1 = coord; specify2 = coord; coord2 = {0.8, 0}
    ls2: LineSegment | specify1 = coord; coord1 = {0.8, 0}; specify2 = coord; coord2 = {1.6, 0}
    ls3: LineSegment | specify1 = coord; coord1 = {1.6, 0}; specify2 = coord; coord2 = {2.4, 0}
    ls4: LineSegment | specify1 = coord; coord1 = {2.4, 0}; specify2 = coord; coord2 = {3.2, 0}
    ls5: LineSegment | specify1 = coord; coord1 = {3.2, 0}; specify2 = coord; coord2 = {4, 0}
    ls6: LineSegment | specify1 = coord; coord1 = {4, 0}; specify2 = coord; coord2 = {4.8, 0}
    ls7: LineSegment | specify1 = coord; coord1 = {4.8, 0}; specify2 = coord; coord2 = {5.6, 0}
    ls8: LineSegment | specify1 = coord; coord1 = {5.6, 0}; specify2 = coord; coord2 = {6.4, 0}
    ls9: LineSegment | specify1 = coord; coord1 = {6.4, 0}; specify2 = coord; coord2 = {7.2, 0}
    ls10: LineSegment | specify1 = coord; coord1 = {7.2, 0}; specify2 = coord; coord2 = {8, 0}
    ls11: LineSegment | specify1 = coord; coord1 = {8, 0}; specify2 = coord; coord2 = {14, 0}
    fin: Finalize "Form Union"

Materials
  mat1: Common "Structural steel" on all boundaries
    def "Basic"
      relpermeability = 1
      heatcapacity = 475[J/(kg*K)]
      thermalconductivity = 44.5[W/(m*K)]
      electricconductivity = 4.032e6[S/m]
      relpermittivity = 1
      thermalexpansioncoefficient = 12.3e-6[1/K]
      density = 7850[kg/m^3]
    Enu "Young's modulus and Poisson's ratio"
      youngsmodulus = 200e9[Pa]
      poissonsratio = 0.30
    Murnaghan
      l = -3.0e11[Pa]
      m = -6.2e11[Pa]
      n = -7.2e11[Pa]
    Lame "Lamé parameters"
      lambLame = 1.15e11[Pa]
      muLame = 7.69e10[Pa]

Physics
  beam: HermitianBeam on all boundaries
    dependent variable u = {u, v, w}
    emm1: Elastic "Linear Elastic Material 1" (default)
    csd1: CrossSectionBeam "Cross Section Data 1" (default)
      CrossSectionDefinition = CommonSections
      SectionType = CircularSection
      do_circ = 2.5[in]
    free1: Free (default)
    init1: init "Initial Values 1" (default)
    fix1: Fixed "Fixed Constraint 1" on points 1
    pl1: PointLoad on points 12 | Fp = {0, -2000[lbf], 0}
    el1: EdgeLoad on boundaries 1 | FeperLength = {0, -1000[lbf/ft], 0}
    el2: EdgeLoad on boundaries 2 | FeperLength = {0, -810[lbf/ft], 0}
    el3: EdgeLoad on boundaries 3 | FeperLength = {0, -640[lbf/ft], 0}
    el4: EdgeLoad on boundaries 4 | FeperLength = {0, -490[lbf/ft], 0}
    el5: EdgeLoad on boundaries 5 | FeperLength = {0, -360[lbf/ft], 0}
    el6: EdgeLoad on boundaries 6 | FeperLength = {0, -250[lbf/ft], 0}
    el7: EdgeLoad on boundaries 7 | FeperLength = {0, -160[lbf/ft], 0}
    el8: EdgeLoad on boundaries 8 | FeperLength = {0, -90[lbf/ft], 0}
    el9: EdgeLoad on boundaries 9 | FeperLength = {0, -40[lbf/ft], 0}
    el10: EdgeLoad on boundaries 10 | FeperLength = {0, -10[lbf/ft], 0}

Mesh
  mesh1 "Mesh 1" (physics-controlled)
    size: MeshSizeDefault | hauto = 3

Studies
  std1 "Study 1"
    stat: Stationary

Solver configurations
  sol1 "Solution 1" (study std1)
    v1: Variables "Dependent Variables 1"
    s1: Stationary "Stationary Solver 1"
      dDef: Direct
      fc1: FullyCoupled | linsolver = dDef

Datasets
  dset1: Solution | solution = sol1

Derived values
  pev1: EvalPoint "Point Evaluation 1" on points 12 | data = dset1; table = tbl1; expr = v; unit = in

Tables
  tbl1: Table
    // Point Evaluation 1 (beam.smax)
    Displacement field, Y component (in), Point: 12
    -61.126

Plots
  pg1: PlotGroup2D "Esfuerzo de flexión" | data = dset1
    line1: Line | expr = beam.smax; unit = ksi; linetype = tube; radiusexpr = beam.re
      def: Deform "Deformation" | expr = {u, v}; descr = Displacement field
  pg2: PlotGroup2D "Moment (beam)" | data = dset1
    line1: Line | expr = beam.Mzl; unit = lbf*in; linetype = tube; radiusexpr = beam.re
      def: Deform "Deformation" | expr = {u, v}; descr = Displacement field
  pg3: PlotGroup2D "Shear Force (beam)" | data = dset1
    line1: Line | expr = beam.Tyl; linetype = tube; radiusexpr = beam.re
      def: Deform "Deformation" | expr = {u, v}; descr = Displacement field
  pg4: PlotGroup2D "Axial Force (beam)" | data = dset1
    line1: Line | expr = beam.Nxl; linetype = tube; radiusexpr = beam.re
      def: Deform "Deformation" | expr = {u, v}; descr = Displacement field
  pg5: PlotGroup2D "Deflexión de la viga" | data = dset1
    line1: Line | expr = v; unit = in; linetype = tube; radiusexpr = beam.re
      def: Deform "Deformation" | expr = {u, v}; descr = Displacement field