// COMSOL Multiphysics 5.6.0.280 model "Practica0_Viga2D.mph"
// Outline of the model tree

Geometry
  geom1 "Geometry 1" (2D, length unit m)
    ls1: LineSegment | specify1 = coord; specify2 = coord; coord2 = {2, 0}
    ls2: LineSegment | specify1 = coord; coord1 = {2, 0}; specify2 = coord; coord2 = {3, 0}
    fin: Finalize "Form Union"

Physics
  beam: HermitianBeam on all boundaries
    dependent variable u = {u, v, w}
    emm1: Elastic "Linear Elastic Material 1" (default) | E_mat = userdef; E = 210E9; nu_mat = userdef; nu = 0.3
    csd1: CrossSectionBeam "Cross Section Data 1" (default)
      CrossSectionDefinition = CommonSections
      SectionType = CircularSection
      do_circ = 5E-2
    free1: Free (default)
    init1: init "Initial Values 1" (default)
    emm2: Elastic "Linear Elastic Material 2" on boundaries 2 | E_mat = userdef; E = 180E9; nu_mat = userdef; nu = 0.3
    csd2: CrossSectionBeam "Cross Section Data 2" on boundaries 2
      CrossSectionDefinition = CommonSections
      SectionType = CircularSection
      do_circ = 4E-2
    fix1: Fixed "Fixed Constraint 1" on points 1
    pl1: PointLoad on points 2 | Fp = {0, -500, 0}
    pl2: PointLoad on points 3 | MpB = -250; Fp = {0, 0, 0}

Mesh
  mesh1 "Mesh 1" (physics-controlled)
    size: MeshSizeDefault | hauto = 3

Studies
  std1 "Study 1"
    stat: Stationary

Solver configurations
  sol1 "Solution 1" (study std1)
    v1: Variables "Dependent Variables 1"
    s1: Stationary "Stationary Solver 1"
      dDef: Direct
      fc1: FullyCoupled | linsolver = dDef

Datasets
  dset1: Solution | solution = sol1

Derived values
  pev1: EvalPoint "Punto en donde se aplica la carga puntual de 500 N" on points 2
    data = dset1
    table = tbl1
    expr = {v, thz}
    unit = {m, rad}
    descr = {"Displacement field, Y component", "Rotation field, Z component"}
  pev2: EvalPoint "Punto en donde se aplica el momento de flexión del -250 Nm" on points 3
    data = dset1
    table = tbl1
    expr = {v, thz}
    unit = {m, rad}
    descr = {"Displacement field, Y component", "Rotation field, Z component"}

Tables
  tbl1: Table
    // Point Evaluation 1
    Displacement field, Y component (m), Point: 3 | Rotation field, Z component (rad), Point: 3
    -0.0572642 | -0.0343345

Plots
  pg1: PlotGroup2D "Esfuerzo de flexión" | data = dset1
    line1: Line | expr = beam.smax; unit = MPa; descr = Max normal stress; linetype = tube; radiusexpr = beam.re
      def: Deform "Deformation" | expr = {u, v}; descr = Displacement field
  pg5: PlotGroup2D "Point Loads (beam)" | data = dset1; typeintitle = off; descriptionintitle = off; unitintitle = off
    arpt1: ArrowPoint "Point Load 1" | expr = {beam.pl1.F_Px, beam.pl1.F_Py}
      col: Color "Color Expression" | expr = comp1.beam.pl1.F_P_Mag
      def: Deform "Deformation" | expr = {u, v}; descr = Displacement field
    arpt2: ArrowPoint "Point Load 2" | expr = {beam.pl2.F_Px, beam.pl2.F_Py}
      col: Color "Color Expression" | expr = comp1.beam.pl2.F_P_Mag
      def: Deform "Deformation" | expr = {u, v}; descr = Displacement field
  pg6: PlotGroup2D "Point Moments (beam)" | data = dset1; typeintitle = off; descriptionintitle = off; unitintitle = off
    arpt1: ArrowPoint "Point Load 2" | expr = {beam.pl2.M_Px, beam.pl2.M_Py}
      col: Color "Color Expression" | expr = comp1.beam.pl2.M_P_Mag
      def: Deform "Deformation" | expr = {u, v}; descr = Displacement field
  pg2: PlotGroup2D "Moment (beam)" | data = dset1
    line1: Line | expr = beam.Mzl; linetype = tube; radiusexpr = beam.re
      def: Deform "Deformation" | expr = {u, v}; descr = Displacement field
  pg3: PlotGroup2D "Shear Force (beam)" | data = dset1
    line1: Line | expr = beam.Tyl; linetype = tube; radiusexpr = beam.re
      def: Deform "Deformation" | expr = {u, v}; descr = Displacement field
  pg4: PlotGroup2D "Axial Force (beam)" | data = dset1
    line1: Line | expr = beam.Nxl; linetype = tube; radiusexpr = beam.re
      def: Deform "Deformation" | expr = {u, v}; descr = Displacement field
  pg7: PlotGroup2D "Deformación" | data = dset1
    line1: Line | expr = beam.disp; unit = m; descr = Desplazamiento total; linetype = tube; radiusexpr = beam.re
      def: Deform "Deformation" | expr = {u, v}; descr = Displacement field