// COMSOL Multiphysics 5.6.0.280 model "Practica7_Analisis_de_vigas_en_2D.mph"
// Outline of the model tree

Geometry
  geom1 "Geometry 1" (2D, length unit m)
    ls1: LineSegment | specify1 = coord; specify2 = coord; coord2 = {2, 0}
    ls2: LineSegment | specify1 = coord; coord1 = {2, 0}; specify2 = coord; coord2 = {3, 0}
    fin: Finalize "Form Union"

Physics
  beam: HermitianBeam on all boundaries
    dependent variable u = {u, v, w}
    BeamFormulation.BeamFormulation = Euler-Bernoulli
    emm1: Elastic "Linear Elastic Material 1" (default) | E_mat = userdef; E = 210e9; nu_mat = userdef; nu = 0.3
    csd1: CrossSectionBeam "Cross Section Data 1" (default)
      CrossSectionDefinition = CommonSections
      SectionType = CircularSection
      do_circ = 0.05
    free1: Free (default)
    init1: init "Initial Values 1" (default)
    csd2: CrossSectionBeam "Cross Section Data 2" on boundaries 2
      CrossSectionDefinition = CommonSections
      SectionType = CircularSection
      do_circ = 0.04
    emm2: Elastic "Linear Elastic Material 2" on boundaries 2 | E_mat = userdef; E = 180e9; nu_mat = userdef; nu = 0.3
    fix1: Fixed "Fixed Constraint 1" on points 1
    pl1: PointLoad on points 2 | Fp = {0, -500, 0}
    pl2: PointLoad on points 3 | MpB = -250

Mesh
  mesh1 "Mesh 1" (physics-controlled)

Studies
  std1 "Study 1"
    stat: Stationary

Solver configurations
  sol1 "Solution 1" (study std1)
    v1: Variables "Dependent Variables 1"
    s1: Stationary "Stationary Solver 1"
      dDef: Direct
      fc1: FullyCoupled | linsolver = dDef

Datasets
  dset1: Solution | solution = sol1

Derived values
  pev1: EvalPoint "Point Evaluation 1" on points 2 | data = dset1; table = tbl1; expr = {v, thz}; unit = {m, rad}
  pev2: EvalPoint "Point Evaluation 2" on points 3 | data = dset1; table = tbl1; expr = {v, thz}; unit = {m, rad}
  pev3: EvalPoint "Point Evaluation 3" on points 1
    data = dset1
    table = tbl1
    expr = {v, thz, beam.smax}
    unit = {m, rad, MPa}

Tables
  tbl1: Table
    // Point Evaluation 1 (v, thz)
    Displacement field, Y component (m), Point: 1 | Rotation field, Z component (rad), Point: 1 | Max normal stress (MPa), Point: 1
    0 | 0 | 101.859

Plots
  pg1: PlotGroup2D "Stress (beam)" | data = dset1
    line1: Line | expr = beam.smax; unit = MPa; linetype = tube; radiusexpr = beam.re
      def: Deform "Deformation" | expr = {u, v}; descr = Displacement field
  pg2: PlotGroup2D "Moment (beam)" | data = dset1
    line1: Line | expr = beam.Mzl; unit = N*m; linetype = tube; radiusexpr = beam.re
      def: Deform "Deformation" | expr = {u, v}; descr = Displacement field
  pg3: PlotGroup2D "Shear Force (beam)" | data = dset1
    line1: Line | expr = beam.Tyl; linetype = tube; radiusexpr = beam.re; tuberadiusscale = 0.48
      def: Deform "Deformation" | expr = {u, v}; descr = Displacement field
  pg4: PlotGroup2D "Axial Force (beam)" | data = dset1
    line1: Line | expr = beam.Nxl; linetype = tube; radiusexpr = beam.re
      def: Deform "Deformation" | expr = {u, v}; descr = Displacement field