// COMSOL Multiphysics 5.6.0.280 model "Practica8_Viga_en_2D_con_carga_Triangular.mph"
// Outline of the model tree

Geometry
  geom1 "Geometry 1" (2D, length unit m)
    ls1: LineSegment | specify1 = coord; specify2 = coord; coord2 = {3, 0}
    ls2: LineSegment | specify1 = coord; coord1 = {3, 0}; specify2 = coord; coord2 = {5, 0}
    ls3: LineSegment | specify1 = coord; coord1 = {5, 0}; specify2 = coord; coord2 = {7.5, 0}
    ls4: LineSegment | specify1 = coord; coord1 = {7.5, 0}; specify2 = coord; coord2 = {10.5, 0}
    ls5: LineSegment | specify1 = coord; coord1 = {10.5, 0}; specify2 = coord; coord2 = {13, 0}
    fin: Finalize "Form Union"

Materials
  mat1: Common "Material 1" on all boundaries
    def "Basic"
      youngsmodulus = 200e9
      poissonsratio = 0.3
      density = 7850

Physics
  beam: HermitianBeam on all boundaries
    dependent variable u = {u, v, w}
    emm1: Elastic "Linear Elastic Material 1" (default)
    csd1: CrossSectionBeam "Cross Section Data 1" (default)
      CrossSectionDefinition = CommonSections
      SectionType = H_Profile
      hy_H = 15[in]
      hz_H = 5.64[in]
      ty_H = 0.622[in]
      tz_H = 0.55[in]
    free1: Free (default)
    init1: init "Initial Values 1" (default)
    pin1: Pinned "Nodo 2" on points 2
    pdr1: DispRot0 "Nodo 5" on points 5 | Direction = {free, prescribed, free}
    pl1: PointLoad "Nodo 3" on points 3 | Fp = {0, -85[kN], 0}
    pl2: PointLoad "Nodo 4" on points 4 | MpB = -45000; Fp = {0, -50[kN], 0}
    el1: EdgeLoad "Tramo EF" on boundaries 5 | FeperLength = {0, -22[kN/m], 0}
    pl3: PointLoad "Nodo 1 Punto A" on points 1 | MpB = -4.5e3; Fp = {0, -6.75[kN], 0}
    pl4: PointLoad "Nodo 2 Punto B" on points 2 | MpB = 6.75e3; Fp = {0, -15.75[kN], 0}

Mesh
  mesh1 "Mesh 1" (physics-controlled)

Studies
  std1 "Study 1"
    stat: Stationary

Solver configurations
  sol1 "Solution 1" (study std1)
    v1: Variables "Dependent Variables 1"
    s1: Stationary "Stationary Solver 1"
      dDef: Direct
      fc1: FullyCoupled | linsolver = dDef

Datasets
  dset1: Solution | solution = sol1

Derived values
  pev1: EvalPoint "Punto A" on points 1 | data = dset1; table = tbl1; expr = v; unit = mm
  pev2: EvalPoint "Punto B" on points 2 | data = dset1; table = tbl1; expr = {v, beam.RFy}; unit = {mm, kN}
  pev3: EvalPoint "Punto C" on points 3 | data = dset1; table = tbl1; expr = v; unit = mm
  pev4: EvalPoint "Punto D" on points 4 | data = dset1; table = tbl1; expr = {v, beam.smax}; unit = {mm, MPa}
  pev5: EvalPoint "Punto E" on points 5 | data = dset1; table = tbl1; expr = {v, beam.RFy}; unit = {mm, kN}
  pev6: EvalPoint "Punto F" on points 6 | data = dset1; table = tbl1; expr = v; unit = mm

Tables
  tbl1: Table
    // Point Evaluation 1 (v)
    Displacement field, Y component (mm), Point: 4 | Displacement field, Y component (mm), Point: 4 | Max normal stress (MPa), Point: 4
    -13.3618 | -13.3618 | 98.0119

Plots
  pg1: PlotGroup2D "Esfuerzo de flexión" | data = dset1
    line1: Line | expr = beam.smax; unit = MPa; linetype = tube; radiusexpr = beam.re
      def: Deform "Deformation" | expr = {u, v}; descr = Displacement field
  pg2: PlotGroup2D "Moment (beam)" | data = dset1
    line1: Line | expr = beam.Mzl; linetype = tube; radiusexpr = beam.re
      def: Deform "Deformation" | expr = {u, v}; descr = Displacement field
  pg3: PlotGroup2D "Shear Force (beam)" | data = dset1
    line1: Line | expr = beam.Tyl; linetype = tube; radiusexpr = beam.re
      def: Deform "Deformation" | expr = {u, v}; descr = Displacement field
  pg4: PlotGroup2D "Axial Force (beam)" | data = dset1
    line1: Line | expr = beam.Nxl; linetype = tube; radiusexpr = beam.re
      def: Deform "Deformation" | expr = {u, v}; descr = Displacement field
  pg5: PlotGroup2D "Deformación de la viga" | data = dset1
    line1: Line | expr = v; unit = mm; linetype = tube; radiusexpr = beam.re; tuberadiusscale = 0.39675273149
      def: Deform "Deformation" | expr = {u, v}; descr = Displacement field