// COMSOL Multiphysics 5.6.0.280 model "1.-Fuerzas de Reacción y Esfuerzos Axiales en Estructuras 2D - COMSOL Ejercicio 1.mph"
// Outline of the model tree

Geometry
  geom1 "Geometry 1" (2D, length unit m)
    ls1: LineSegment | specify1 = coord; specify2 = coord; coord2 = {-1.224733, 0.7071}
    ls2: LineSegment | specify1 = coord; specify2 = coord; coord2 = {0.7071, 0.7071}
    fin: Finalize "Form Union"

Materials
  mat1: Common "Material 1" on all boundaries
    def "Basic"
      youngsmodulus = 200e9
      poissonsratio = 0.3
      density = 7850

Physics
  truss: Truss on all boundaries
    dependent variable u = {u, v, w}
    emm1: Elastic "Linear Elastic Material 1" (default)
    csd1: CrossSectionBeam "Cross Section Data 1" (default) | area = 400[mm^2]
    sec1: StraightEdgeConstraint (default)
    free1: Free (default)
    init1: init "Initial Values 1" (default)
    pin1: Pinned on points 1, 3
    pl1: PointLoad on points 2 | Fp = {0, -33.46e3, 0}
    csd2: CrossSectionBeam "Cross Section Data 2" on boundaries 2 | area = 200[mm^2]

Mesh
  mesh1 "Mesh 1" (physics-controlled)

Studies
  std1 "Study 1"
    stat: Stationary

Solver configurations
  sol1 "Solution 1" (study std1)
    v1: Variables "Dependent Variables 1"
    s1: Stationary "Stationary Solver 1"
      dDef: Direct
      fc1: FullyCoupled | linsolver = dDef

Datasets
  dset1: Solution | solution = sol1

Derived values
  pev1: EvalPoint "Point Evaluation 1" on points 2 | data = dset1; table = tbl1; expr = {u, v}; unit = {mm, mm}

Tables
  tbl1: Table
    // Point Evaluation 1 ()
    Displacement field, X component (mm), Punto: 2 | Displacement field, Y component (mm), Punto: 2
    -0.0712392 | -0.98939

Plots
  pg1: PlotGroup2D "Force (truss)" | data = dset1
    line1: Line | expr = truss.Nxl; unit = kN; linetype = tube; radiusexpr = sqrt(truss.area/pi)
      def1: Deform "Deformation" | expr = {u, v}
  pg2: PlotGroup2D "Stress (truss)" | data = dset1
    line1: Line | expr = truss.sn; unit = MPa; linetype = tube; radiusexpr = sqrt(truss.area/pi)
      def1: Deform "Deformation" | expr = {u, v}