// COMSOL Multiphysics 5.6.0.280 model "Practica15_ToberaFluidos.mph"
// Outline of the model tree

Parameters
  T = 25[degC]  // Temperatura del agua
  Vin = 20[cm/s]  // Velocidad de entrada del agua

Geometry
  geom1 "Geometry 1" (2D axisymmetric, length unit m)
    ls1: LineSegment | specify1 = coord; coord1 = {0, 1}; specify2 = coord; coord2 = {0.2, 1}
    ls2: LineSegment | specify1 = coord; coord1 = {0.2, 1}; specify2 = coord; coord2 = {0.2, -0.25}
    b1: BezierPolygon "Bézier Polygon 1"
      p = {{0.2, 0.1, 0.1}, {-0.25, -0.65, -1.05}}
      degree = 2
      w = {1, 1/sqrt(2), 1}
      type = open
    ls3: LineSegment | specify1 = coord; coord1 = {0.1, -1.05}; specify2 = coord; coord2 = {0, -1.05}
    ls4: LineSegment | specify1 = coord; coord1 = {0, -1.05}; specify2 = coord; coord2 = {0, 1}
    csol1: ConvertToSolid | input = b1, ls1, ls2, ls3, ls4
    ls5: LineSegment | specify1 = coord; coord1 = {0, 0.6}; specify2 = coord; coord2 = {0.1, 0.6}
    ls6: LineSegment | specify1 = coord; coord1 = {0.1, 0.6}; specify2 = coord; coord2 = {0, 0.2}
    ls7: LineSegment | specify1 = coord; coord1 = {0, 0.2}; specify2 = coord; coord2 = {0, 0.6}
    csol2: ConvertToSolid | input = ls5, ls6, ls7
    dif1: Difference | input = csol1; input2 = csol2; intbnd = off; edge = all
    fil1: Fillet | point = dif1(1) points 6; radius = 0.03
    fin: Finalize "Form Union"

Materials
  mat1: Common "Water" on all domains
    def "Basic"
      dynamicviscosity = eta(T[1/K])[Pa*s]
      ratioofspecificheat = 1.0
      electricconductivity = 5.5e-6[S/m]
      heatcapacity = Cp(T[1/K])[J/(kg*K)]
      density = rho(T[1/K])[kg/m^3]
      thermalconductivity = k(T[1/K])[W/(m*K)]
      soundspeed = cs(T[1/K])[m/s]
      eta: Piecewise
        arg = T
        pieces = 
          {273.15, 413.15, 1.3799566804-0.021224019151*T^1+1.3604562827E-4*T^2-4.6454090319E-7*T^3+8.9042735735E-10*T^4-9.0790692686E-13*T^5+3.8457331488E-16*T^6}
          {413.15, 553.75, 0.00401235783-2.10746715E-5*T^1+3.85772275E-8*T^2-2.39730284E-11*T^3}
      Cp: Piecewise | arg = T; pieces = {273.15, 553.75, 12010.1471-80.4072879*T^1+0.309866854*T^2-5.38186884E-4*T^3+3.62536437E-7*T^4}
      rho: Piecewise | arg = T; pieces = {273.15, 553.75, 838.466135+1.40050603*T^1-0.0030112376*T^2+3.71822313E-7*T^3}
      k: Piecewise | arg = T; pieces = {273.15, 553.75, -0.869083936+0.00894880345*T^1-1.58366345E-5*T^2+7.97543259E-9*T^3}
      cs: Interpolation | table = {{273, 1403}, {278, 1427}, {283, 1447}, {293, 1481}, {303, 1507}, {313, 1526}, {323, 1541}, {333, 1552}, {343, 1555}, {353, 1555}, {363, 1550}, {373, 1543}}; interp = piecewisecubic

Physics
  spf: LaminarFlow on all domains
    dependent variable u = {u, v, w}
    fp1: FluidProperties (default)
    init1: init "Initial Values 1" (default)
    axi1: AxialSymmetry (default)
    wallbc1: WallBC "Wall 1" (default)
    inl1: InletBoundary "Inlet 1" on boundaries 6 | U0in = Vin
    out1: OutletBoundary "Outlet 1" on boundaries 2

Mesh
  mesh1 "Mesh 1"
    size: MeshSizeDefault | table = cfd; hmax = 0.044; hmin = 0.0014; hnarrow = 0.9; hgrad = 1.4; hauto = 9
    cr1: CornerRefinement on domains 1 | boundary = boundaries 3, 5, 7-9
    ftri1: FreeTri "Free Triangular 1" on remaining entities
    bl1: BndLayer "Boundary Layers 1" on domains 1 | sharpcorners = trim
      blp1: BndLayerProp "Boundary Layer Properties 1" on boundaries 3, 5, 7-9
        blnlayers = 2
        blhminfact = 5
        blhmin = 0.0137

Studies
  std1 "Study 1"
    param: Parametric "Parametric Sweep" | pname = Vin; plistarr = 0.2; punit = m/s
    stat: Stationary

Solver configurations
  sol1 "Solution 1" (study std1)
    v1: Variables "Dependent Variables 1"
    s1: Stationary "Stationary Solver 1"
      p1: Parametric | pname = Vin; plistarr = 0.2; punit = m/s; pcontinuationmode = no
      fc1: FullyCoupled | linsolver = d1; initstep = 0.01; minstep = 1.0E-6; maxiter = 100
      d1: Direct | linsolver = pardiso

Datasets
  dset1: Solution | solution = sol1
  rev1: Revolve2D "Revolution 2D" | data = dset1; startangle = -90; revangle = 225

Plots
  pg1: PlotGroup2D "Velocity (spf)" | data = dset1
    surf1: Surface | expr = spf.U
  pg2: PlotGroup2D "Pressure (spf)" | data = dset1
    surf1: Surface | expr = p
  pg3: PlotGroup3D "Velocity (spf) 1" | data = rev1
    arws1: ArrowSurface | revcoordsys = cylindrical; expr = {u, v, w}; arrowcount = 2000
      col1: Color "Color Expression 1" | expr = spf.U
    surf1: Surface | expr = p