// COMSOL Multiphysics 5.6.0.280 model "Practica1_Estructura2D.mph"
// Outline of the model tree

Geometry
  geom1 "Geometry 1" (2D, length unit m)
    b1: BezierPolygon "Bézier Polygon 1"
      p = 
        {0, 1.7931, 3.8636, 5.6567, 4.2424, 2.8284, 1.4142}
        {0, 1.035, 1.035, 0, 1.4142, 2.8284, 1.4142}
      degree = {1, 1, 1, 1, 1, 1}
      w = {1, 1, 1, 1, 1, 1, 1, 1, 1, 1, 1, 1}
      type = open
    b2: BezierPolygon "Bézier Polygon 2" | p = {{0, 1.4142}, {0, 1.4142}}; degree = 1; w = {1, 1}
    b3: BezierPolygon "Bézier Polygon 3"
      p = {{1.4142, 1.7931, 2.8284, 3.8636, 4.2424}, {1.4142, 1.035, 2.8284, 1.035, 1.4142}}
      degree = {1, 1, 1, 1}
      w = {1, 1, 1, 1, 1, 1, 1, 1}
      type = open
    fin: Finalize "Form Union"

Physics
  truss: Truss on all boundaries
    dependent variable u = {u, v, w}
    emm1: Elastic "Linear Elastic Material 1" (default) | E_mat = userdef; E = 200e9; nu_mat = userdef; nu = 0.3
    csd1: CrossSectionBeam "Cross Section Data 1" (default) | area = 71.43[mm^2]
    sec1: StraightEdgeConstraint (default)
    free1: Free (default)
    init1: init "Initial Values 1" (default)
    pin1: Pinned on points 1
    disp1: Displacement0 "Prescribed Displacement 1" on points 7 | Direction = {0, 1, 0}
    pl1: PointLoad on points 2 | Fp = {1414.2135, -1414.2135, 0}
    pl2: PointLoad on points 4 | Fp = {0, -4000, 0}

Mesh
  mesh1 "Mesh 1" (physics-controlled)

Studies
  std1 "Study 1"
    stat: Stationary

Solver configurations
  sol1 "Solution 1" (study std1)
    v1: Variables "Dependent Variables 1"
    s1: Stationary "Stationary Solver 1"
      dDef: Direct
      fc1: FullyCoupled | linsolver = dDef

Datasets
  dset1: Solution | solution = sol1

Derived values
  av1: AvLine "Line Average 1" on boundaries 9 | data = dset1; table = tbl1; expr = truss.Nxl
  pev1: EvalPoint "Apoyo Izquierdo Inferior" on points 1
    data = dset1
    table = tbl2
    expr = {u, v, truss.disp, truss.RFy, truss.RFx}
    unit = {mm, mm, mm, kN, kN}
  pev2: EvalPoint "Apoyo Superior" on points 4
    data = dset1
    table = tbl2
    expr = {u, v, truss.disp}
    unit = {mm, mm, mm}
  pev3: EvalPoint "Apoyo Derecho Inferior" on points 7
    data = dset1
    table = tbl2
    expr = {u, v, truss.disp, truss.RFy}
    unit = {mm, mm, mm, kN}
  av2: AvLine "Elemento 6" on boundaries 4 | data = dset1; table = tbl3; expr = {truss.sn, truss.Nxl}; unit = {MPa, kN}
  av3: AvLine "Elemento 9" on boundaries 5 | data = dset1; table = tbl3; expr = {truss.sn, truss.Nxl}; unit = {MPa, kN}
  av4: AvLine "Elemento 3" on boundaries 6 | data = dset1; table = tbl3; expr = {truss.sn, truss.Nxl}; unit = {MPa, kN}
  pev4: EvalPoint "Reacciones Nodo 1" on points 1
    data = dset1
    table = tbl2
    expr = {truss.RFx, truss.RFy, }
    unit = {kN, kN, }
  pev5: EvalPoint "Reacciones Nodo 4" on points 7
    data = dset1
    table = tbl2
    expr = {truss.RFx, truss.RFy, }
    unit = {kN, kN, }

Tables
  tbl2: Table
    // Point Evaluation 1 (u)
    Displacement field, X component (mm), Point: 1 | Displacement field, Y component (mm), Point: 1 | Total displacement (mm), Point: 1 | Reaction force, y component (kN), Point: 1 | Reaction force, x component (kN), Point: 1
    0 | 0 | 0 | 2.70706 | -1.41421
  tbl3: Table
    // Elemento 6 (truss.sn)
    Axial stress at center line (MPa) | Local axial force (kN)
    59.7697 | 4.26935

Plots
  pg3: PlotGroup2D "Desplazamiento" | data = dset1
    line1: Line | expr = truss.disp; unit = mm
      def1: Deform "Deformation 1" | expr = {u, v}
  pg1: PlotGroup2D "Force (truss)" | data = dset1
    line1: Line | expr = truss.Nxl; unit = kN; linetype = tube; radiusexpr = sqrt(truss.area/pi)
      def1: Deform "Deformation" | expr = {u, v}
  pg2: PlotGroup2D "Stress (truss)" | data = dset1
    line1: Line | expr = truss.sn; unit = MPa; linetype = tube; radiusexpr = sqrt(truss.area/pi)
      def1: Deform "Deformation" | expr = {u, v}