// COMSOL Multiphysics 5.6.0.280 model "Practica2_Armadura3D.mph"
// Outline of the model tree

Geometry
  geom1 "Geometry 1" (3D, length unit m)
    b1: BezierPolygon "Bézier Polygon 1"
      p = {{0, 0, 5, 5, 5, 0, 5}, {0, 2, 0, 4, 0, 2, 4}, {3, 3, 6, 3, 0, 3, 3}}
      degree = {1, 1, 1, 1, 1, 1}
      w = {1, 1, 1, 1, 1, 1, 1, 1, 1, 1, 1, 1}
    fin: Finalize "Form Union"

Physics
  truss: Truss on all edges
    dependent variable u = {u, v, w}
    emm1: Elastic "Linear Elastic Material 1" (default) | E_mat = userdef; E = 200e9; nu_mat = userdef; nu = 0.29
    csd1: CrossSectionBeam "Cross Section Data 1" (default) | area = 7.5^2[mm^2]
    sec1: StraightEdgeConstraint (default)
    free1: Free (default)
    init1: init "Initial Values 1" (default)
    pin1: Pinned on points 4
    pin2: Pinned on points 1
    pin3: Pinned on points 3
    pl1: PointLoad on points 5 | Fp = {6e3, 0, 0}

Mesh
  mesh1 "Mesh 1" (physics-controlled)

Studies
  std1 "Study 1"
    stat: Stationary

Solver configurations
  sol1 "Solution 1" (study std1)
    v1: Variables "Dependent Variables 1"
    s1: Stationary "Stationary Solver 1"
      dDef: Direct
      fc1: FullyCoupled | linsolver = dDef

Datasets
  dset1: Solution | solution = sol1

Derived values
  pev2: EvalPoint "nodo1 (punto A)" on points 5
    data = dset1
    table = tbl1
    expr = {u, v, w, truss.disp}
    unit = {mm, mm, mm, mm}
  pev1: EvalPoint "nodo2 (Punto B)" on points 2
    data = dset1
    table = tbl1
    expr = {u, v, w, truss.disp}
    unit = {mm, mm, mm, mm}
  pev3: EvalPoint "nodo5 (Punto E)" on points 1
    data = dset1
    table = tbl1
    expr = {truss.RFx, truss.RFy, truss.RFz, }
    unit = {kN, kN, kN, }
  pev4: EvalPoint "nodo4 (Punto D)" on points 4
    data = dset1
    table = tbl1
    expr = {truss.RFx, truss.RFy, truss.RFz, }
    unit = {kN, kN, kN, }
  pev5: EvalPoint "nodo3 (Punto C)" on points 3
    data = dset1
    table = tbl1
    expr = {truss.RFx, truss.RFy, truss.RFz, }
    unit = {kN, kN, kN, }
  av1: AvLine "Elemento 6" on edges 1 | data = dset1; table = tbl2; expr = {truss.Nxl, truss.sn}; unit = {kN, MPa}
  av2: AvLine "Elemento 5" on edges 3 | data = dset1; table = tbl2; expr = {truss.Nxl, truss.sn}; unit = {kN, MPa}
  av3: AvLine "Elemento 2" on edges 6 | data = dset1; table = tbl2; expr = {truss.Nxl, truss.sn}; unit = {kN, MPa}
  av4: AvLine "Elemento 3" on edges 5 | data = dset1; table = tbl2; expr = {truss.Nxl, truss.sn}; unit = {kN, MPa}
  av5: AvLine "Elemento 4" on edges 2 | data = dset1; table = tbl2; expr = {truss.Nxl, truss.sn}; unit = {kN, MPa}
  av6: AvLine "Elemento 1" on edges 4 | data = dset1; table = tbl2; expr = {truss.Nxl, truss.sn}; unit = {kN, MPa}

Tables
  tbl1: Table
    // Point Evaluation 1 (u, v, w, truss.disp)
    Reaction force, x component (kN), Point: 1 | Reaction force, y component (kN), Point: 1 | Reaction force, z component (kN), Point: 1
    0 | -4.8 | 0
  tbl2: Table
    // Elemento 6 (truss.Nxl, truss.sn)
    Local axial force (kN) | Axial stress at center line (MPa)
    6.4622 | 114.884

Plots
  pg3: PlotGroup3D "Displacement" | data = dset1
    line1: Line | expr = truss.disp; unit = mm; linetype = tube
      def1: Deform "Deformation 1" | expr = {u, v, w}
  pg1: PlotGroup3D "Force (truss)" | data = dset1
    line1: Line | expr = truss.Nxl; unit = kN; linetype = tube; radiusexpr = sqrt(truss.area/pi)
      def1: Deform "Deformation" | expr = {u, v, w}
  pg2: PlotGroup3D "Stress (truss)" | data = dset1
    line1: Line | expr = truss.sn; unit = MPa; linetype = tube; radiusexpr = sqrt(truss.area/pi)
      def1: Deform "Deformation" | expr = {u, v, w}